9*x - 4*y = 45  # error: Эта переменная не определена.
5*x + 9*y =  # error: Эта переменная не определена.
9*x - 4*y =  # error
5*x + 9*y = 88  # error: Эта переменная не определена.
x := 1
y := 1
A := [5, (9*y); (9*x), -4]
B := [88; 45]
[x; y] := A^-1*B
[x; y] = [7.49505; 5.61386]
Given
5*x + 9*y == 88
9*x - 4*y == 45
Find(x, y) → [757/101; 567/101]
