# Задание 1
# Задание 2
x1 := 7
y1 := 10
z := -3
n := 1
x := 2
y := (sqrt(x^3 + n) + cos(|n*x - 1|)^2)/(nthroot((x^5 + sin(x) + n), 4)*cos(π*(x + n)/4))
y = -1.92924
p := if(x1 > y1, sin(x1) + 3*|y1| - z^2, (y1 + 3)*ln(|x1 + 1|)/sqrt(z^2 + 1))
p = 8.5485
# Задание 3
asin(62 °) = 1.5708 - 0.402504i
x2 := -2, -1.6 .. 2
q := if(x1 > y1 and x1 < 1, cos(x1) + 2*|y1 + 1| - z, (x1*y1 + 3)/sqrt(y1^2 + 5))
q = 7.12407
f(x2) := (x2^2 - n*x2 + sin(x2))*sqrt(|x2 - cos(n*x2)|)
x2 = [-2; -1.6; -1.2; -0.8; -0.4; 0; 0.4; 0.8; 1.2; 1.6; 2]
f(x2) = [6.40671; 3.96101; 2.13485; 0.884082; 0.196062; 0; 0.107857; 0.17913; 1.07268; 2.5012; 4.5222]
w := if(x1 < y1 or y1 ≥ 10, x1^2 + 2*(y1*x1 + 1) - z, (x1^-3*y1^2 + 3)*sqrt(z^2 + 7))
w = 194
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# Задание 4
A := runif(3, -3, 3)
B := runif(3, -3, 3)
C := runif(3, -3, 3)
transpose(A) = [-2.99239, -1.84006, 0.510037]
transpose(B) = [-0.898151, 1.93703, -1.95523]
transpose(C) = [1.26297, -1.17608, -2.45153]
B1 := -B
B1 = [0.898151; -1.93703; 1.95523]
s := A*B
V := B1×C
w := (A×B)*C
s = -1.87387
w = 28.9773
V = [7.04819; 4.67124; 1.39011]
# Задание 5
dA := sqrt(A[0]^2 + A[1]^2 + A[2]^2)
dB := sqrt(B[0]^2 + B[1]^2 + B[2]^2)
dC := sqrt(C[0]^2 + C[1]^2 + C[2]^2)
f1(x3) := e^(-(|x3|/3))*cos(x3)
Array := [dA; dB; dC]
Array = [3.5497; 2.89511; 2.99805]
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Max := max(Array)
Max = 3.5497  # Это С
i := 0, 1 .. 9
j := 0, 1 .. 9
M[i, j] := -10 + floor(rnd(20))
# Задание 6
x4 := -9, -8.75 .. 9
x4 = [
    -9; -8.75; -8.5; -8.25; -8; -7.75; -7.5; -7.25; -7; -6.75
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]
f4(x4) := if(x4 < 0, e^x4*x4^3, e^(-x4)*x4^3)
f4(x4) = [
    -0.0899657; -0.106157; -0.124955; -0.146701; -0.171757; -0.200504; -0.233332; -0.270632; -0.312776; -0.3601
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]
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M = [
    -8, 9, -8, -10, 0, 2, -7, -1, -9, 5;
    0, 7, 9, 0, -1, 7, 5, 9, 2, -5;
    6, -3, 3, -10, -5, 1, 6, -1, 4, -1;
    4, 1, 4, 1, -7, -2, 0, 5, -7, -1;
    3, -8, -8, 3, -2, 9, -7, 6, -7, 6;
    -7, 4, -5, 3, 4, -8, 6, 0, -2, 8;
    0, -1, 6, -1, 9, 4, -7, 6, 0, -10;
    1, 0, 6, 3, 6, -8, -4, -5, -8, 6;
    2, -5, -10, 6, -6, 1, -8, 5, 0, -2;
    3, -2, 1, 2, 0, 3, -7, -7, -1, -9
]
SumPos(A) :=
    s ← 0
    for i ∈ 0 .. 9
        for j ∈ 0 .. 9
            s ← s + A[i, j] if A[i, j] > 0
    return s
sum(sum(M[i, j], j = 0 .. 9), i = 0 .. 9) = -29
X := M[:, 0]
Y := transpose(M)[:, 9]
SumNeg(A) :=
    s ← 0
    for i ∈ 0 .. 9
        for j ∈ 0 .. 9
            s ← s + A[i, j] if A[i, j] < 0
    return s
SumPos(M) = 212
f4x := [0.842; 0.759; 0.68; 0.605; 0.535; 0.471; 0.413; 0.36; 0.313; 0.271; 0.233; 0.201] = [0.842; 0.759; 0.68; 0.605; 0.535; 0.471; 0.413; 0.36; 0.313; 0.271; 0.233; 0.201]
SumNeg(M) = -241
f4x[9] = 0.271
Y := transpose(Y)
X = [-8; 0; 6; 4; 3; -7; 0; 1; 2; 3]
Y = [3, -2, 1, 2, 0, 3, -7, -7, -1, -9]
# Задание 7
x71 := -2*π
s2 := 1, 2 .. 16
Δx := π/4
x7[s2] := x71 + Δx*s2
g7(x7) := sqrt(|x7|)*sin(x7)
X*Y = [
    -24, 16, -8, -16, 0, -24, 56, 56, 8, 72;
    0, 0, 0, 0, 0, 0, 0, 0, 0, 0;
    18, -12, 6, 12, 0, 18, -42, -42, -6, -54;
    12, -8, 4, 8, 0, 12, -28, -28, -4, -36;
    9, -6, 3, 6, 0, 9, -21, -21, -3, -27;
    -21, 14, -7, -14, 0, -21, 49, 49, 7, 63;
    0, 0, 0, 0, 0, 0, 0, 0, 0, 0;
    3, -2, 1, 2, 0, 3, -7, -7, -1, -9;
    6, -4, 2, 4, 0, 6, -14, -14, -2, -18;
    9, -6, 3, 6, 0, 9, -21, -21, -3, -27
]
x7 = [0; -5.49779; -4.71239; -3.92699; -3.14159; -2.35619; -1.5708; -0.785398; 0; 0.785398; 1.5708; 2.35619; 3.14159; 3.92699; 4.71239; 5.49779; 6.28319]
g7(x7) = [0; 2.69879; 3.81667; 2.69879; 0; -2.69879; -3.81667; -2.69879; 0; 2.69879; 3.81667; 2.69879; 0; -2.69879; -3.81667; -2.69879; 0]  # Задание 8
x9 := -3 .. 3
q1(x9) := e^(-x9^2)
q2(x9) := d/dx9(q1(x9))
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O := x7
Y11 := g7(x7)
filename1 := "Matr_X.txt"
filename2 := "Matr_Y.txt"
WRITEPRN(filename1) := O
WRITEPRN(filename2) := Y11
XX := READPRN(filename1)
YY := READPRN(filename2)
# Задание 9
x911 := -15
x912 := 15
Δx91 := 1
i91 := 0 .. 42
y911 := -15
y912 := 15
Δy91 := 1
j91 := 0 .. 42
XX = [0; -5.498; -4.712; -3.927; -3.142; -2.356; -1.571; -0.7854; 0; 0.7854; 1.571; 2.356; 3.142; 3.927; 4.712; 5.498; 6.283]
h(x91, y91) := sin(sqrt(x91^2 + y91^2))/sqrt(x91^2 + y91^2)
YY = [0; 2.699; 3.817; 2.699; 0; -2.699; -3.817; -2.699; 0; 2.699; 3.817; 2.699; 0; -2.699; -3.817; -2.699; 0]
x91[i91] := -15 + (30/43)*i91
y91[j91] := -15 + (30/43)*j91
Z[i91, j91] := h(x91[i91], y91[j91])
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# [component: inputs Z]
# Задача 10
x := -5 .. 5
f(x) := x^2 + (x - 2)*sin(x) - 5
root(f(x), x) = [-1.32936; -1.32936; -1.32936; -1.32936; -1.32936; -1.32936; 2.19967; 2.19967; 2.19967; 2.19967; 2.19967]
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root(f(x), x, -5, 2) = -1.32936
root(f(x), x, -5, 2)/root(f(x), x, 2, 5) = -0.604347
root(f(x), x, 2, 5) = 2.19967
# Задание 11
x11 := -4 .. 4  # Задание 13
f11(x11) := x11^2 + x11*sin(2*x11) - (x11 - 5)*cos(x11)
A13 := [n, (n + 1), (n + 2); (n - 3), (n - 2), n; (n - 1), n, (n + 1)]
B13 := [(6*n + 8); (6*n - 7); (6*n + 2)]
(-2.974 - 1.933)/2 = -2.4535
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root(f11(x11), x11, -4, -2) = -2.97354
[x13; y13; z13] := A13^-1*B13
root(f11(x11), x11, -2, 4) = -1.93283
[x13; y13; z13] = [1; 2; 3]
X13 := 0
Y13 := 0
Z13 := 0
Given
n*X13 + (n + 1)*Y13 + (n + 2)*Z13 == 6*n + 8
(n - 3)*X13 + (n - 2)*Y13 + n*Z13 == 6*n - 7
(n - 1)*X13 + n*Y13 + (n + 1)*Z13 == 6*n + 2
# Задание 12
Find(X13, Y13, Z13) → [1; 2; 3]
n12 := 1
p12(x12) := x12^3 + (4 - n12)*x12^2 + (3 - 4*n12)*x12 - 3*n12
V12 := [3*n12; 3 - 4*n; 4 - n; 1]  # Задание 14
X12 := polyroots(V12)
(X14^2/81) + (Y14^2/16) - 1 == (X14 - 9)^2 + (Y14 - 2)^2 - 25 solve, X14, Y14 → [9/2, 0; 549/40, 0]
X12 = [-3.5251; 0.262551 - 0.884368i; 0.262551 + 0.884368i]
# Задание 15
f15(x15) := x15*sin(x15)
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Минимум
x15 := 4
x15 := Minimize(f15, x15)
x15 = 4.91318
f15(x15) = -4.81447
f15(10) = -5.44021
Максимумы
x15 := 8
x15 := Maximize(f15, x15)
x15 = 7.97867
f15(x15) = 7.91673
x15 := 2
x15 := Maximize(f15, x15)
x15 = 2.02876
f15(x15) = 1.81971
