# Задание 11
x := -4, -3.8 .. 5
f(x) := x^2 + x*sin(2*x) - (x - 5)*cos(x)
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root(f(x), x, -2, 0) = -1.93283
root(f(x), x, -4, -2) = -2.97354
f(-1.933) = -0.00110412
f(-2.974) = 0.00411823
f(x) := 2*x - 9
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root(f(x), x, 2, 6) = 4.5
