# Задание 13
n := round(rnd(1)*9 + 1) = 1
B := [6*n + 8; 6*n - 7; 6*n + 2]
A := [n, n + 1, n + 2; n - 3, n - 2, n; n - 1, n, n + 1]
B = [14; -1; 8]
A = [1, 2, 3; -2, -1, 1; 0, 1, 2]
X1 := A^-1*B = [1; 2; 3]
A*X1 = [14; -1; 8]
X11 := lsolve(A, B) = [1; 2; 3]
x := X1[0]
y := X1[1]
z := X1[2]
Given
n*x + (n + 1)*y + (n + 2)*z == 6*n + 8
(n - 3)*x + (n - 2)*y + n*z == 6*n - 7
(n - 1)*x + n*y + (n + 1)*z == 6*n + 2
X2 := Find(x, y, z) = [1; 2; 3]
Given
2*x + 3*y == 5
3*x + 2*y == 5
X3 := Find(x, y) = [1; 1]
x := -5 .. 5
y1(x) := (5 - 2*x)/3
y2(x) := (5 - 3*x)/2
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