# Задание 14
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x := 4
y := 3
Given
x^2/81 + y^2/16 == 1
(x - 9)^2 + (y - 2)^2 == 25
V := Find(x, y) = [4.23934; 3.52845]
check2 := (V[0] - 9)^2 + (V[1] - 2)^2 = 25
chek1 := V[0]^2/81 + V[1]^2/16 = 1
y := -3
x := 7
Given
x^2/81 + y^2/16 == 1
(x - 9)^2 + (y - 2)^2 == 25
V := Find(x, y) = [6.9308; -2.55175]
chek3 := V[0]^2/81 + V[1]^2/16 = 1
check4 := (V[0] - 9)^2 + (V[1] - 2)^2 = 25
