# Задание 15
x := 0 .. 10
f(x) := x*sin(x)
f(x) = [0; 0.841471; 1.81859; 0.42336; -3.02721; -4.79462; -1.67649; 4.59891; 7.91487; 3.70907; -5.44021]
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x := 2
x1_max := Maximize(f, x) = 2.02876
f(7) = 4.59891
x := 3
x1_min := Minimize(f, x) = 4.91318
x := 5
x2_max := Maximize(f, x) = 7.97867
