x := READPRN("C:\Users\Влад\Desktop\Lab\lab11\Lab01\X_bez.txt")
y := READPRN("C:\Users\Влад\Desktop\Lab\lab11\Lab01\Y_bez.txt")
yB := READPRN("C:\Users\Влад\Desktop\Lab\lab11\Lab01\YB_bez.txt")
xB := READPRN("C:\Users\Влад\Desktop\Lab\lab11\Lab01\XB_bez.txt")
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