x := READPRN("C:\Users\Влад\Desktop\Lab\lab11\Lab01\X_lagr.txt")
y := READPRN("C:\Users\Влад\Desktop\Lab\lab11\Lab01\Y_lagr.txt")
yL := READPRN("C:\Users\Влад\Desktop\Lab\lab11\Lab01\YL_lagr.txt")
xL := READPRN("C:\Users\Влад\Desktop\Lab\lab11\Lab01\XL_lagr.txt")
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