Xa := -2
Xb := -3
Xc := 0
Xd := 3
Xe := 2
Xf := -2
Xh := 2
Ya := -4
Yb := 0
Yc := 4
Yd := 0
Ye := -4
Yf := 0
Yh := 0
Xlw := 100
Ylw := 200
xhw := 400
yhw := 500
Zx := transpose([Xa, Xb, Xc, Xd, Xe, Xf, Xh])
Zy := transpose([Ya, Yb, Yc, Yd, Ye, Yf, Yh])
Xl := min(Zx) = -3
xh := max(Zx) = 3
yh := max(Zy) = 4
Yl := min(Zy) = -4
ΔXw := xhw - Xlw = 300
ΔX := xh - Xl = 6
ΔYw := yhw - Ylw = 300
ΔY := yh - Yl = 8
Kx := ΔXw/ΔX = 50
Ky := ΔYw/ΔY = 37.5
Tsw := [Kx, 0, Xlw - Kx*Xl; 0, -Ky, yhw + Ky*Yl; 0, 0, 1]
Tsw = [50, 0, 250; 0, -37.5, 350; 0, 0, 1]
[Xaw; Yaw; q] := Tsw*[Xa; Ya; 1]
[Xaw; Yaw; q] = [150; 500; 1]
[Xbw; Ybw; q] := Tsw*[Xb; Yb; 1]
[Xbw; Ybw; q] = [100; 350; 1]
[Xcw; Ycw; q] := Tsw*[Xc; Yc; 1]
[Xcw; Ycw; q] = [250; 200; 1]
[Xdw; Ydw; q] := Tsw*[Xd; Yd; 1]
[Xdw; Ydw; q] = [400; 350; 1]
[Xew; Yew; q] := Tsw*[Xe; Ye; 1]
[Xew; Yew; q] = [350; 500; 1]
[Xfw; Yfw; q] := Tsw*[Xf; Yf; 1]
[Xfw; Yfw; q] = [150; 350; 1]
Xh = 2
[Xhw; Yhw; q] := Tsw*[Xh; Yh; 1]
Tsw = [50, 0, 250; 0, -37.5, 350; 0, 0, 1]
2*50 + 0*0 + 1*250 = 350
[Xhw; Yhw; q] = [350; 350; 1]
Yh = 0
q = 1
Xhw = 350
X := transpose([Xb, Xc, Xd, Xb, Xf, Xa, Xe, Xh, Xd])
Yhw = 350
Y := transpose([Yb, Yc, Yd, Yb, Yf, Ya, Ye, Yh, Yd])
q = 1
Xw := transpose([Xbw, Xcw, Xdw, Xbw, Xfw, Xaw, Xew, Xhw, Xdw])
Yw := transpose([Ybw, Ycw, Ydw, Ybw, Yfw, Yaw, Yew, Yhw, Ydw])
XOa := -2
XOb := 2
XOc := 0
XOd := -2
XO := transpose([XOa, XOb, XOc, XOd])
X = [-3; 0; 3; -3; -2; -2; 2; 2; 3]
Y = [0; 4; 0; 0; 0; -4; -4; 0; 0]
Xw = [100; 250; 400; 100; 150; 150; 350; 350; 400]
Yw = [350; 200; 350; 350; 350; 500; 500; 350; 350]
YOa := 1
YOb := 1
YOc := 3.5
YOd := 1
YO := transpose([YOa, YOb, YOc, YOd])
XOaw := 150
XObw := 350
XOcw := 250
XOdw := 150
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XOw := transpose([XOaw, XObw, XOcw, XOdw])
YOaw := 330
YObw := 330
YOcw := 230
YOdw := 330
YOw := transpose([YOaw, YObw, YOcw, YOdw])
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f(x) := sqrt(|x|)*sin(π*x)
x1 := -6
x2 := 6
ΔX := 0.1
Xlw := 100
Ylw := 200
Xhw := 800
Yhw := 900
N := round((x2 - x1)/ΔX) = 120
i := 0 .. N
X[i] := x1 + i*ΔX
Y[i] := f(X[i])
Z[i] := 1
Xl := min(X) = -6
Xh := max(X) = 6
Yl := min(Y) = -2.34521
Yh := max(Y) = 2.34521
M := stack(transpose(X), transpose(Y), transpose(Z))
ΔXw := Xhw - Xlw = 700
Δx := Xh - Xl = 12
ΔYw := Yhw - Ylw = 700
Δy := Yh - Yl = 4.69042
ky := ΔYw/Δy = 149.241
kx := ΔXw/Δx = 58.3333
Tsw := [kx, 0, Xlw - kx*Xl; 0, -ky, Yhw + ky*Yl; 0, 0, 1]
Mw := Tsw*M
Xw := transpose(Mw)[:, 0]
Yw := transpose(Mw)[:, 1]
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