# Координаты вершин пирамиды (C, B, A, C1, B1, A1), параметры положения камеры:
# Х координаты вершин
PIR := [0, 0, 3, 0, 0, 1; 3, 0, 0, 1, 0, 0; 0, 0, 0, 3, 3, 3; 1, 1, 1, 1, 1, 1]  # Y координаты вершин
# Z координаты вершин
# Однородные координаты
# 10 - расстояние от начала координат
PV := [10; 15; 45]  # 45 - азимутальный угол в плоскости XY
# 30 - зенитный угол от оси Z
pC := submatrix(PIR, 0, 2, 0, 0) = [0; 3; 0]
pC1 := submatrix(PIR, 0, 2, 3, 3) = [0; 1; 3]
pB := submatrix(PIR, 0, 2, 1, 1) = [0; 0; 0]
pB1 := submatrix(PIR, 0, 2, 4, 4) = [0; 0; 3]
pA := submatrix(PIR, 0, 2, 2, 2) = [3; 0; 0]
pA1 := submatrix(PIR, 0, 2, 5, 5) = [1; 0; 3]
# Cферические координаты точки наблюдения:
r_v := PV[0] = 10
ϕ_v := PV[1]*π/180 = 0.261799
θ_v := PV[2]*π/180 = 0.785398
# Угол между осью z и вектором нормали к секущей плоскости
ϕ_grad := 33
ϕ := ϕ_grad/180*π = 0.575959
# Вектор нормали к секущей плоскости
N := transpose([0, sin(ϕ), cos(ϕ)]) = [0; 0.544639; 0.838671]
# Координаты точки пересечения оси Z (ребра BB1) и секущей плоскости
x_0 := 0
y_0 := 0
z_0 := 3/4*PIR[:, 3][2] = 2.25
D := -(N[0]*x_0 + N[1]*y_0 + N[2]*z_0) = -1.88701
V1 := pC = [0; 3; 0]
V2 := pC1 = [0; 1; 3]
ΔV := V2 - V1 = [0; -2; 3]
t_AD1 := -((N*V1 + D)/(N*ΔV)) = 0.177392
Vad := V1 + ΔV*t_AD1 = [0; 2.64522; 0.532177]
x_AD := Vad[0] = 0
y_AD := Vad[1] = 2.64522
z_AD := Vad[2] = 0.532177  # - координаты точки P1
# Находим точку пересечения P2 секущей плоскости с ребром AA1
V1 := pA = [3; 0; 0]
V2 := pA1 = [1; 0; 3]
ΔV := V2 - V1 = [-2; 0; 3]
t_CF := -((N*V1 + D)/(N*ΔV)) = 0.75
V_CF := V1 + ΔV*t_CF = [1.5; 0; 2.25]
x_CF := V_CF[0] = 1.5
y_CF := V_CF[1] = 0
z_CF := V_CF[2] = 2.25  # - координаты точки Р2
# Находим точку пересечения P3 секущей плоскости с ребром BB1
V1 := pB = [0; 0; 0]
V2 := pB1 = [0; 0; 3]
ΔV := V2 - V1 = [0; 0; 3]
t_BE := -((N*V1 + D)/(N*ΔV)) = 0.75
V_BE := V1 + ΔV*t_BE
x_BE := V_BE[0] = 0
y_BE := V_BE[1] = 0
z_BE := V_BE[2] = 2.25  # - координаты точки Р3
# Матрица мировых коорднат точек P1, P2, P3 (сечение)
TR := [x_AD, x_CF, x_BE; y_AD, y_CF, y_BE; z_AD, z_CF, z_BE; 1, 1, 1] = [0, 1.5, 0; 2.64522, 0, 0; 0.532177, 2.25, 2.25; 1, 1, 1]
# Формируем матрицу пересчёта мировых координат в видовые
K_view := [
    -sin(ϕ_v), cos(ϕ_v), 0, 0;
    -cos(θ_v)*cos(ϕ_v), -cos(θ_v)*sin(ϕ_v), sin(θ_v), 0;
    -sin(θ_v)*cos(ϕ_v), -sin(θ_v)*sin(ϕ_v), -cos(θ_v), r_v;
    0, 0, 0, 1
] = [
    -0.258819, 0.965926, 0, 0;
    -0.683013, -0.183013, 0.707107, 0;
    -0.683013, -0.183013, -0.707107, 10;
    0, 0, 0, 1
]
# Вычисляем координаты вершин пирамиды в ВСК
PIR_V := K_view*PIR = [
    2.89778, 0, -0.776457, 0.965926, 0, -0.258819;
    -0.549038, 0, -2.04904, 1.93831, 2.12132, 1.43831;
    9.45096, 10, 7.95096, 7.69567, 7.87868, 7.19567;
    1, 1, 1, 1, 1, 1
]
# Вычисляем координаты вершин треугольника сечения Р1, Р2, Р3 в ВСК
TR_V := K_view*TR = [2.55508, -0.388229, 0; -0.107802, 0.566471, 1.59099; 9.13959, 7.38449, 8.40901; 1, 1, 1]
# Определяем координаты проекции вершин пирамиды на картинную плоскость (без координат по Z)
P_XY := stack(transpose(transpose(PIR_V)[:, 0]), transpose(transpose(PIR_V)[:, 1]), transpose(transpose(PIR_V)[:, 3])) = [
    2.89778, 0, -0.776457, 0.965926, 0, -0.258819;
    -0.549038, 0, -2.04904, 1.93831, 2.12132, 1.43831;
    1, 1, 1, 1, 1, 1
]
# Определяем координаты проекции вершин треугольника сечения Р1, Р2, Р3 на картинную плоскость (без координат по Z)
TR_XY := stack(transpose(transpose(TR_V)[:, 0]), transpose(transpose(TR_V)[:, 1]), transpose(transpose(TR_V)[:, 3])) = [2.55508, -0.388229, 0; -0.107802, 0.566471, 1.59099; 1, 1, 1]
# Определяем область проекции пирамиды на картинную плоскость XY ВСК
x_L := min(transpose(P_XY)[:, 0]) = -0.776457
y_H := max(transpose(P_XY)[:, 1]) = 2.12132
x_L = -0.776457
y_H = 2.12132
x_H := max(transpose(P_XY)[:, 0]) = 2.89778
y_L := min(transpose(P_XY)[:, 1]) = -2.04904
x_H = 2.89778
y_L = -2.04904
# Координаты в ОСК:
x_LW := 200
y_LW := 100
x_HW := 700
y_HW := 500
Δx_W := x_HW - x_LW = 500
Δx := x_H - x_L = 3.67423
Δy_W := y_HW - y_LW = 400
Δy := y_H - y_L = 4.17036
k_x := Δx_W/Δx = 136.083
k_y := Δy_W/Δy = 95.915
T_SW := [k_x, 0, x_LW - k_x*x_L; 0, -k_y, y_HW + k_y*y_L; 0, 0, 1]
# Вычисляем координаты вершин пирамиды в ОСК, округляем до целых
M_W := T_SW*P_XY = [
    700, 305.662, 200, 437.108, 305.662, 270.442;
    356.127, 303.466, 500, 117.554, 100, 165.511;
    1, 1, 1, 1, 1, 1
]
[x_c, x_b, x_a, x_c1, x_b1, x_a1; y_c, y_b, y_a, y_c1, y_b1, y_a1; q, q, q, q, q, q] := vectorize(round(M_W)) = [700, 306, 200, 437, 306, 270; 356, 303, 500, 118, 100, 166; 1, 1, 1, 1, 1, 1]
vectorize(round(M_W)) = [700, 306, 200, 437, 306, 270; 356, 303, 500, 118, 100, 166; 1, 1, 1, 1, 1, 1]
# Формируем массивы координат X и Y для рисования пирамиды
X := transpose([x_c, x_b, x_a, x_c, x_c1, x_b1, x_b, x_b1, x_a1, x_a, x_a1, x_c1])
Y := transpose([y_c, y_b, y_a, y_c, y_c1, y_b1, y_b, y_b1, y_a1, y_a, y_a1, y_c1])
# Вычисляем оконные координаты вершин треугольника сечения Р1, Р2, Р3
TR_W := T_SW*TR_XY = [653.365, 252.831, 305.662; 313.806, 249.133, 150.867; 1, 1, 1]
[x_p1, x_p2, x_p3; y_p1, y_p2, y_p3; q, q, q] := vectorize(round(TR_W)) = [653, 253, 306; 314, 249, 151; 1, 1, 1]
# Формируем массивы координат Х и У для рисования сечения пирамиды
XC := transpose([x_p1, x_p2, x_p3, x_p1])
YC := transpose([y_p1, y_p2, y_p3, y_p1])
R_C := [r_v*sin(θ_v)*cos(ϕ_v); r_v*sin(θ_v)*sin(ϕ_v); r_v*cos(θ_v)] = [6.83013; 1.83013; 7.07107]
# График без удаления граней c сечение | График без удаления граней
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# Координаты векторов AC и AA1 (x, y, z):
AC := [pC[0]; pC[1]; pC[2]] - [pA[0]; pA[1]; pA[2]] = [-3; 3; 0]
AA1 := [pA1[0]; pA1[1]; pA1[2]] - [pA[0]; pA[1]; pA[2]] = [-2; 0; 3]
N_AA1C1C := AC×AA1 = [9; 9; 6]
A1B1 := [pB1[0]; pB1[1]; pB1[2]] - [pA1[0]; pA1[1]; pA1[2]] = [-1; 0; 0]
A1C1 := [pC1[0]; pC1[1]; pC1[2]] - [pA1[0]; pA1[1]; pA1[2]] = [-1; 1; 0]
N_A1B1C1 := A1B1×A1C1 = [0; 0; -1]
AB := [pB[0]; pB[1]; pB[2]] - [pA[0]; pA[1]; pA[2]] = [-3; 0; 0]
AC := [pC[0]; pC[1]; pC[2]] - [pA[0]; pA[1]; pA[2]] = [-3; 3; 0]
N_ABC := AB×AC = [0; 0; -9]
N_AA1B1B := AA1×AB = [0; -9; 0]
BB1 := [pB1[0]; pB1[1]; pB1[2]] - [pB[0]; pB[1]; pB[2]] = [0; 0; 3]
BC := [pC[0]; pC[1]; pC[2]] - [pB[0]; pB[1]; pB[2]] = [0; 3; 0]
N_BB1C1C := BB1×BC = [-9; 0; 0]
# Определяем видимость граней пирамиды:
R_C := [r_v*sin(θ_v)*cos(ϕ_v); r_v*sin(θ_v)*sin(ϕ_v); r_v*cos(θ_v)] = [6.83013; 1.83013; 7.07107]
q1 := N_AA1C1C*R_C
F5x := transpose([x_a, x_a1, x_c1, x_c, x_a])
s1 := if(q1 ≥ 0, "Видно", "Не видно")
F5y := transpose([y_a, y_a1, y_c1, y_c, y_a])
s1 = "Видно"
F5x := if(q1 ≥ 0, F5x, F5x*0)
q2 := N_AA1B1B*R_C
s2 := if(q2 ≥ 0, "Видно", "Не видно")
F1x := transpose([x_a, x_a1, x_b1, x_b, x_a])
s2 = "Не видно"
F1y := transpose([y_a, y_a1, y_b1, y_b, y_a])
q3 := N_BB1C1C*R_C
F1x := if(q2 ≥ 0, F1x, F1x*0)
s3 := if(q3 ≥ 0, "Видно", "Не видно")
s3 = "Не видно"
F2x := transpose([x_b, x_b1, x_c1, x_c, x_b])
q4 := N_ABC*R_C
F2y := transpose([y_b, y_b1, y_c1, y_c, y_b])
s4 := if(q4 ≥ 0, "Видно", "Не видно")
F2x := if(q3 ≥ 0, F2x, F2x*0)
s4 = "Не видно"
F4x := transpose([x_a, x_b, x_c, x_a])
q5 := N_A1B1C1*R_C
F3x := transpose([x_b1, x_a1, x_c1, x_b1])
F4y := transpose([y_a, y_b, y_c, y_a])
s5 := if(q5 ≥ 0, "Видно", "Не видно")
F4x := if(q4 ≥ 0, F4x, F4x*0)
s5 = "Не видно"
F3y := transpose([y_b1, y_a1, y_c1, y_b1])
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